// COMSOL Multiphysics 6.1.0.282 model "Q1.mph"
// Outline of the model tree

Parameters
  delta = 6.8966e-4
  n1 = 1.45
  lam0 = 1.55[um]
  b = 10*a
  a = 9.1[um]
  airL = 1.2*b
  n2 = n1*(1-delta)
  n0 = 1
  pml = 10[um]
  f0 = c_const/lam0

Geometry
  geom1 "Geometry 1" (2D, length unit m)
    c1: Circle | r = a
    c2: Circle | r = b
    c3: Circle | r = airL
    fin: Finalize "Form Union"

Materials
  mat1: Common "Material 1" on domains 3
    RefractiveIndex
      n = n1
      ki = 0
  mat2: Common "Material 2" on domains 2
    RefractiveIndex
      n = n2
      ki = 0
  mat3: Common "Material 3" on domains 1
    RefractiveIndex
      n = n0
      ki = 0

Physics
  ewfd: ElectromagneticWavesFrequencyDomain on all domains
    dependent variable E = {Ex, Ey, Ez}
    wee1: WaveEquationElectric (default) | n_mat = from_mat
    pec1: PerfectElectricConductor (default)
    init1: init "Initial Values 1" (default)

Mesh
  mesh1 "Mesh 1" (physics-controlled)
    size: MeshSizeDefault | hauto = 3

Studies
  std1 "Study 1"
    param: Parametric "Parametric Sweep" | pname = f0; plistarr = range(0.3*1.9341E14,0.2E14,1.2*1.9341E14); punit = 1/s
    mode: ModeAnalysis | modeFreq = f0; shift = 1.449; conrad = 1; linpsolnum = auto

Solver configurations
  sol1 "Solution 1" (study std1)
    v1: Variables "Dependent Variables 1"
    e1: Eigenvalue "Eigenvalue Solver 1" | shift = 1.449
      d1: Direct "Suggested Direct Solver (ewfd)"
  sol2 "Parametric Solutions 1" (study std1)

Datasets
  dset1: Solution | solution = sol1
  dset2: Solution | solution = sol2
  cln1: CutLine2D | data = dset2; genpoints = {{0, -1.09201E-4}, {0, 1.09201E-4}}

Plots
  pg1: PlotGroup2D "Electric Field (ewfd)" | data = dset1
    surf1: Surface | data = dset1; expr = ewfd.Hz
  pg2: PlotGroup2D "2D Plot Group 2" | data = dset1
    arws1: ArrowSurface | expr = {ewfd.Hx, ewfd.Hy}; xnumber = 30; ynumber = 30
  pg3: PlotGroup1D "1D Plot Group 3" | data = dset1
    lngr1: LineGraph on all boundaries
      data = dset2
      expr = (((ewfd.beta*c_const)/(2*pi*ewfd.freq))-n1)/(n2-n1)
      descr = b
      xdata = expr
      xdataexpr = ((2*pi*ewfd.freq)/c_const)*a*(n1^2-n2^2)^(0.5)
  pg4: PlotGroup2D "Electric Field (ewfd) 1" | data = dset2
    surf1: Surface | expr = ewfd.Ez